folder simulations: version=29
  folder Soils
    soil GH00970001: Site=?; Longitude=0.966
      Comment = ICASA Classification: PALEUSTALF  # Comments
      Latitude = 9.416  # Latitude (WGS84)
      DataSource = Naab site1D
      Water
        Layer:
          Thickness (mm)  BD (g/cc)  AirDry (mm/mm)  LL15 (mm/mm)  DUL (mm/mm)  SAT (mm/mm)
          50.0            1.39       -99.999         0.095         0.257        0.359
          100.0           1.39       -99.999         0.06          0.227        0.359
          150.0           1.59       -99.999         0.06          0.228        0.34
          150.0           1.59       -99.999         0.105         0.229        0.342
          150.0           1.63       -99.999         0.12          0.205        0.342
          300.0           1.45       -99.999         0.13          0.2          0.347
        SoilCrop peanut
          Layer:
            Thickness (mm)  LL (mm/mm)  KL (/day)  XF (0-1)
            50.0            0.095       -99.999    1.0
            100.0           0.06        -99.999    1.0
            150.0           0.06        -99.999    0.7
            150.0           0.105       -99.999    0.35
            150.0           0.12        -99.999    0.25
            300.0           0.13        -99.999    0.05
      SoilWat: SummerCona=3.5; SummerU=6.0; SummerDate=21-Mar; WinterCona=3.5; WinterU=6.0; WinterDate=21-Sep; DiffusConst=-99.999; DiffusSlope=-99.999; Salb=0.13; Cn2Bare=76.0; CnRed=20; CnCov=0.8
        Layer:
          Thickness (mm)  SWCON (0-1)
          50.0            0.4
          100.0           0.4
          150.0           0.4
          150.0           0.4
          150.0           0.4
          300.0           0.4
      SoilOrganicMatter: RootCn=45; RootWt=500; SoilCn=14.5; EnrACoeff=7.4; EnrBCoeff=0.2
        Layer:
          Thickness (mm)  OC (Total %)  FBiom (0-1)  FInert (0-1)
          50.0            0.41          -243.9       -243.9
          100.0           0.41          -243.9       -243.9
          150.0           0.32          -312.497     -312.497
          150.0           0.28          -357.139     -357.139
          150.0           0.28          -357.139     -357.139
          300.0           0.17          -588.229     -588.229
      Analysis
        Layer:
          Thickness (mm)  PH (1:5 water)
          50.0            6.7
          100.0           6.7
          150.0           6.4
          150.0           6.1
          150.0           6.1
          300.0           6.0
    soil GH00970002: Site=?; Longitude=0.966
      Comment = ICASA Classification: PALEUSTALF  # Comments
      Latitude = 9.416  # Latitude (WGS84)
      DataSource = Naab site1D2
      Water
        Layer:
          Thickness (mm)  BD (g/cc)  AirDry (mm/mm)  LL15 (mm/mm)  DUL (mm/mm)  SAT (mm/mm)
          50.0            1.39       -99.999         0.095         0.257        0.359
          100.0           1.39       -99.999         0.06          0.227        0.359
          150.0           1.59       -99.999         0.06          0.228        0.34
          150.0           1.59       -99.999         0.105         0.229        0.342
          150.0           1.63       -99.999         0.12          0.216        0.342
          300.0           1.45       -99.999         0.13          0.216        0.347
        SoilCrop peanut: same as Soils.GH00970001.Water.peanut
      SoilWat: SummerCona=3.5; SummerU=6.0; SummerDate=21-Mar; WinterCona=3.5; WinterU=6.0; WinterDate=21-Sep; DiffusConst=-99.999; DiffusSlope=-99.999; Salb=0.13; Cn2Bare=76.0; CnRed=20; CnCov=0.8
        Layer:
          Thickness (mm)  SWCON (0-1)
          50.0            0.65
          100.0           0.65
          150.0           0.65
          150.0           0.65
          150.0           0.65
          300.0           0.65
      SoilOrganicMatter: same as Soils.GH00970001.SoilOrganicMatter
      Analysis: same as Soils.GH00970001.Analysis
  simulation GHNY9701_7-97 DATE1 CHINESE
    memo LOG
      This .apsim file was created by the APSIM AgMIP translator.
      Log messages:
        * Clock ERROR: Missing a simulation start date (sdat).
        * Clock ERROR: Missing a simulation end date (endat).
        * Met WARNING: No CO2 found in weather data (aco2 or co2y).
        * Soil layer 1 ERROR: Missing airdry.
        * Soil layer 1 ERROR: Missing KL (apsim_kl).
        * Soil layer 1 ERROR: Missing FBIOM (both slacc and slfac).
        * Soil layer 1 ERROR: Missing InertC (both slic and slfic).
        * Soil layer 2 ERROR: Missing airdry.
        * Soil layer 2 ERROR: Missing KL (apsim_kl).
        * Soil layer 2 ERROR: Missing FBIOM (both slacc and slfac).
        * Soil layer 2 ERROR: Missing InertC (both slic and slfic).
        * Soil layer 3 ERROR: Missing airdry.
        * Soil layer 3 ERROR: Missing KL (apsim_kl).
        * Soil layer 3 ERROR: Missing FBIOM (both slacc and slfac).
        * Soil layer 3 ERROR: Missing InertC (both slic and slfic).
        * Soil layer 4 ERROR: Missing airdry.
        * Soil layer 4 ERROR: Missing KL (apsim_kl).
        * Soil layer 4 ERROR: Missing FBIOM (both slacc and slfac).
        * Soil layer 4 ERROR: Missing InertC (both slic and slfic).
        * Soil layer 5 ERROR: Missing airdry.
        * Soil layer 5 ERROR: Missing KL (apsim_kl).
        * Soil layer 5 ERROR: Missing FBIOM (both slacc and slfac).
        * Soil layer 5 ERROR: Missing InertC (both slic and slfic).
        * Soil layer 6 ERROR: Missing airdry.
        * Soil layer 6 ERROR: Missing KL (apsim_kl).
        * Soil layer 6 ERROR: Missing FBIOM (both slacc and slfac).
        * Soil layer 6 ERROR: Missing InertC (both slic and slfic).
        * Soil ERROR: Missing diffusConst (diffusConst).
        * Soil ERROR: Missing diffusSlope (diffusSlope).
        * Initial conditions layer 1 ERROR: Missing NO3 (icno3).
        * Initial conditions layer 1 ERROR: Missing NH4 (icnh4).
        * Initial conditions layer 2 ERROR: Missing NO3 (icno3).
        * Initial conditions layer 2 ERROR: Missing NH4 (icnh4).
        * Initial conditions layer 3 ERROR: Missing NO3 (icno3).
        * Initial conditions layer 3 ERROR: Missing NH4 (icnh4).
        * Initial conditions layer 4 ERROR: Missing NO3 (icno3).
        * Initial conditions layer 4 ERROR: Missing NH4 (icnh4).
        * Initial conditions layer 5 ERROR: Missing NO3 (icno3).
        * Initial conditions layer 5 ERROR: Missing NH4 (icnh4).
        * Initial conditions layer 6 ERROR: Missing NO3 (icno3).
        * Initial conditions layer 6 ERROR: Missing NH4 (icnh4).
    clock
      start_date = ?  # Enter the start date of the simulation
      end_date = ?  # Enter the end date of the simulation
    metfile met: filename=GHNY.met
    summaryfile
    area paddock
      soil -> /simulations/Soils/GH00970001
        Sample Initial nitrogen
          Layer:
            Thickness (mm)  NO3 (ppm)  NH4 (ppm)
            50.0            -99.999    -99.999
            100.0           -99.999    -99.999
            150.0           -99.999    -99.999
            150.0           -99.999    -99.999
            150.0           -99.999    -99.999
            300.0           -99.999    -99.999
          Date = 19970529  # Sample date
        Sample Initial water
          Layer:
            Thickness (mm)  SW (mm/mm)
            50.0            0.108
            100.0           0.108
            150.0           0.108
            150.0           0.227
            150.0           0.213
            300.0           0.196
          Date = 19970529  # Sample date
      surfaceom SurfaceOrganicMatter
        PoolName = OrganicMatter  # Organic Matter pool name
        type = peanut  # Organic Matter type
        mass = 1000.0  # Initial surface residue (kg/ha)
        cnr = 75.4717  # C:N ratio of initial residue
        standing_fraction = 0  # Fraction of residue standing
      fertiliser
      irrigation
        automatic_irrigation = off
        asw_depth = 600  # Depth to which ASW is calculated. (mm)
        crit_fr_asw = 0.5  # Fraction of ASW below which irrigation is applied (0-1.0)
        irrigation_efficiency = 1  # Efficiency of the irrigation. (0-1.0)
        irrigation_allocation = off  # Allocation limits
        allocation = 0  # Allocation in mm
        default_no3_conc = 0.0  # Nitrate concentration (ppm N)
        default_nh4_conc = 0.0  # Ammonium concentration (ppm N)
        default_cl_conc = 0.0  # Chloride concentration (ppm Cl)
      peanut
        ini: filename=peanut.xml
      folder Manager folder
        operations
          29/05/1997  peanut sow plants = 10.0, sowing_depth = 50.0 (mm), cultivar = GH0001, row_spacing = 500.0 (mm), crop_class = plant
        manager Harvesting rule
          # Harvesting criteria
          crop = peanut  # Enter name of crop to harvest when ripe
          on end_of_day:
```
if [crop].StageName = 'harvest_ripe'  or [crop].plant_status = 'dead' then
   acmo do_output
   [crop] harvest
   [crop] end_crop
endif
```
      outputfile: filename=AgMIP.out; title=AgMIP
        variables
          variables: dd/mm/yyyy as Date, biomass, yield, esw, lai
        events Reporting Frequency: event=daily
      outputfile ACMO: filename=MACH0001_1__1 ACMO.out; title=MACH0001_1__1 ACMO; events=Reporting Frequency
        variables
          variable:
            yield
            biomass
            AnthesisDate format yyyy-mm-dd
            MaturityDate format yyyy-mm-dd
            Today as HarvestDate format yyyy-mm-dd
            LAIMax
            InCropRain
            SumEP
            SumNO3Uptake
            SumLeachNO3
          constants: constant format=csv
      manager2 ACMOVariables
```csharp
using System;
using ModelFramework;
using CSGeneral;

public class Script 
{      
   [Link] Paddock MyPaddock; 
   [Input] DateTime Today;
   
   [Input] double LAI;
   [Input] double ep;
   [Input] double Rain;
   [Input] double[] flow_no3;
   [Input] DateTime Simulation_end_date;
   [Output] DateTime AnthesisDate;
   [Output] DateTime MaturityDate;
   [Units("m2/m2")]
   [Output] double LAIMax = 0;
   [Units("mm")]
   [Output] double InCropRain = 0;
   [Units("mm")]
   [Output] double SumEP = 0;
   [Units("kg/ha")]
   [Output] double SumNO3Uptake = 0;
   [Units("kg/ha")]
   [Output] double SumLeachNO3 = 0;
   
   private bool ACMOHasWritten = false;
   
   // The following event handler will be called each time a crop is sown.
   [EventHandler] public void OnSowing()
   {
      LAIMax = 0.0;
      InCropRain = 0.0;
      SumEP = 0.0;
      SumNO3Uptake = 0;
      SumLeachNO3 = 0;
      ACMOHasWritten = false;
   }   
      
   // The following event handler will be called each day at the beginning of the day
   [EventHandler] public void OnPost()
   {
      // Work out flowering and maturity dates.
            string StageName;
      MyPaddock.Get("StageName", out StageName);
      if (StageName.ToLower() == "flowering") AnthesisDate = Today;
      if (StageName.ToLower() == "maturity") MaturityDate = Today;      
            
      // Get no3_uptake for whole profile (as a positive number)
      double no3_uptake = 0;
            double[] no3_uptake_array;
      MyPaddock.Get("no3_uptake", out no3_uptake_array);
      no3_uptake = -MathUtility.Sum(no3_uptake_array);  //change from negative number to positive
            LAIMax = Math.Max(LAIMax, LAI);
      SumEP = SumEP + ep;
      SumNO3Uptake = SumNO3Uptake + no3_uptake;
      InCropRain = InCropRain + Rain;
      SumLeachNO3 = SumLeachNO3 + flow_no3[flow_no3.Length - 1];
      
      
   }
   
}
```
  simulation GHNY9701_8-97 DATE1 F-MIX
    memo LOG: same as GHNY9701_7-97 DATE1 CHINESE.LOG
    clock
      start_date = ?  # Enter the start date of the simulation
      end_date = ?  # Enter the end date of the simulation
    metfile met: filename=GHNY.met
    summaryfile
    area paddock
      soil -> /simulations/Soils/GH00970001
        Sample Initial nitrogen: same as GHNY9701_7-97 DATE1 CHINESE.paddock.Soil.Initial nitrogen
        Sample Initial water
          Layer:
            Thickness (mm)  SW (mm/mm)
            50.0            0.108
            100.0           0.108
            150.0           0.108
            150.0           0.227
            150.0           0.213
            300.0           0.196
          Date = 19970529  # Sample date
      surfaceom SurfaceOrganicMatter
        PoolName = OrganicMatter  # Organic Matter pool name
        type = peanut  # Organic Matter type
        mass = 1000.0  # Initial surface residue (kg/ha)
        cnr = 75.4717  # C:N ratio of initial residue
        standing_fraction = 0  # Fraction of residue standing
      fertiliser
      irrigation: same as GHNY9701_7-97 DATE1 CHINESE.paddock.Irrigation
      peanut
        ini: filename=peanut.xml
      folder Manager folder
        operations
          29/05/1997  peanut sow plants = 10.0, sowing_depth = 50.0 (mm), cultivar = GH0002, row_spacing = 500.0 (mm), crop_class = plant
        manager Harvesting rule
          # Harvesting criteria
          crop = peanut  # Enter name of crop to harvest when ripe
          on end_of_day:
          script: same as in GHNY9701_7-97 DATE1 CHINESE.paddock.Manager folder.Harvesting rule
      outputfile: same as GHNY9701_7-97 DATE1 CHINESE.paddock.outputfile
      outputfile ACMO: same as GHNY9701_7-97 DATE1 CHINESE.paddock.ACMO
      manager2 ACMOVariables: same as GHNY9701_7-97 DATE1 CHINESE.paddock.ACMOVariables
  simulation GHNY9701_9-97 DATE2 CHINESE
    memo LOG: same as GHNY9701_7-97 DATE1 CHINESE.LOG
    clock
      start_date = ?  # Enter the start date of the simulation
      end_date = ?  # Enter the end date of the simulation
    metfile met: filename=GHNY.met
    summaryfile
    area paddock
      soil -> /simulations/Soils/GH00970002
        Sample Initial nitrogen
          Layer:
            Thickness (mm)  NO3 (ppm)  NH4 (ppm)
            50.0            -99.999    -99.999
            100.0           -99.999    -99.999
            150.0           -99.999    -99.999
            150.0           -99.999    -99.999
            150.0           -99.999    -99.999
            300.0           -99.999    -99.999
          Date = 19970626  # Sample date
        Sample Initial water
          Layer:
            Thickness (mm)  SW (mm/mm)
            50.0            0.225
            100.0           0.225
            150.0           0.225
            150.0           0.232
            150.0           0.216
            300.0           0.226
          Date = 19970626  # Sample date
      surfaceom SurfaceOrganicMatter
        PoolName = OrganicMatter  # Organic Matter pool name
        type = peanut  # Organic Matter type
        mass = 1000.0  # Initial surface residue (kg/ha)
        cnr = 75.4717  # C:N ratio of initial residue
        standing_fraction = 0  # Fraction of residue standing
      fertiliser
      irrigation: same as GHNY9701_7-97 DATE1 CHINESE.paddock.Irrigation
      peanut
        ini: filename=peanut.xml
      folder Manager folder
        operations
          26/06/1997  peanut sow plants = 10.0, sowing_depth = 50.0 (mm), cultivar = GH0001, row_spacing = 500.0 (mm), crop_class = plant
        manager Harvesting rule
          # Harvesting criteria
          crop = peanut  # Enter name of crop to harvest when ripe
          on end_of_day:
          script: same as in GHNY9701_7-97 DATE1 CHINESE.paddock.Manager folder.Harvesting rule
      outputfile: same as GHNY9701_7-97 DATE1 CHINESE.paddock.outputfile
      outputfile ACMO: same as GHNY9701_7-97 DATE1 CHINESE.paddock.ACMO
      manager2 ACMOVariables: same as GHNY9701_7-97 DATE1 CHINESE.paddock.ACMOVariables
  simulation GHNY9701_10-97 DATE2 F-MIX
    memo LOG: same as GHNY9701_7-97 DATE1 CHINESE.LOG
    clock
      start_date = ?  # Enter the start date of the simulation
      end_date = ?  # Enter the end date of the simulation
    metfile met: filename=GHNY.met
    summaryfile
    area paddock
      soil -> /simulations/Soils/GH00970002
        Sample Initial nitrogen: same as GHNY9701_9-97 DATE2 CHINESE.paddock.Soil.Initial nitrogen
        Sample Initial water
          Layer:
            Thickness (mm)  SW (mm/mm)
            50.0            0.225
            100.0           0.225
            150.0           0.225
            150.0           0.232
            150.0           0.216
            300.0           0.226
          Date = 19970626  # Sample date
      surfaceom SurfaceOrganicMatter
        PoolName = OrganicMatter  # Organic Matter pool name
        type = peanut  # Organic Matter type
        mass = 1000.0  # Initial surface residue (kg/ha)
        cnr = 75.4717  # C:N ratio of initial residue
        standing_fraction = 0  # Fraction of residue standing
      fertiliser
      irrigation: same as GHNY9701_7-97 DATE1 CHINESE.paddock.Irrigation
      peanut
        ini: filename=peanut.xml
      folder Manager folder
        operations
          26/06/1997  peanut sow plants = 10.0, sowing_depth = 50.0 (mm), cultivar = GH0002, row_spacing = 500.0 (mm), crop_class = plant
        manager Harvesting rule
          # Harvesting criteria
          crop = peanut  # Enter name of crop to harvest when ripe
          on end_of_day:
          script: same as in GHNY9701_7-97 DATE1 CHINESE.paddock.Manager folder.Harvesting rule
      outputfile: same as GHNY9701_7-97 DATE1 CHINESE.paddock.outputfile
      outputfile ACMO: same as GHNY9701_7-97 DATE1 CHINESE.paddock.ACMO
      manager2 ACMOVariables: same as GHNY9701_7-97 DATE1 CHINESE.paddock.ACMOVariables
  simulation GHNY9701_11-97 DATE3 CHINESE
    memo LOG: same as GHNY9701_7-97 DATE1 CHINESE.LOG
    clock
      start_date = ?  # Enter the start date of the simulation
      end_date = ?  # Enter the end date of the simulation
    metfile met: filename=GHNY.met
    summaryfile
    area paddock
      soil -> /simulations/Soils/GH00970002
        Sample Initial nitrogen
          Layer:
            Thickness (mm)  NO3 (ppm)  NH4 (ppm)
            50.0            -99.999    -99.999
            100.0           -99.999    -99.999
            150.0           -99.999    -99.999
            150.0           -99.999    -99.999
            150.0           -99.999    -99.999
            300.0           -99.999    -99.999
          Date = 19970724  # Sample date
        Sample Initial water
          Layer:
            Thickness (mm)  SW (mm/mm)
            50.0            0.16
            100.0           0.16
            150.0           0.16
            150.0           0.213
            150.0           0.202
            300.0           0.217
          Date = 19970724  # Sample date
      surfaceom SurfaceOrganicMatter
        PoolName = OrganicMatter  # Organic Matter pool name
        type = peanut  # Organic Matter type
        mass = 1000.0  # Initial surface residue (kg/ha)
        cnr = 75.4717  # C:N ratio of initial residue
        standing_fraction = 0  # Fraction of residue standing
      fertiliser
      irrigation: same as GHNY9701_7-97 DATE1 CHINESE.paddock.Irrigation
      peanut
        ini: filename=peanut.xml
      folder Manager folder
        operations
          24/07/1997  peanut sow plants = 10.0, sowing_depth = 50.0 (mm), cultivar = GH0001, row_spacing = 500.0 (mm), crop_class = plant
        manager Harvesting rule
          # Harvesting criteria
          crop = peanut  # Enter name of crop to harvest when ripe
          on end_of_day:
          script: same as in GHNY9701_7-97 DATE1 CHINESE.paddock.Manager folder.Harvesting rule
      outputfile: same as GHNY9701_7-97 DATE1 CHINESE.paddock.outputfile
      outputfile ACMO: same as GHNY9701_7-97 DATE1 CHINESE.paddock.ACMO
      manager2 ACMOVariables: same as GHNY9701_7-97 DATE1 CHINESE.paddock.ACMOVariables
  simulation GHNY9701_12-97 DATE3 F-MIX
    memo LOG: same as GHNY9701_7-97 DATE1 CHINESE.LOG
    clock
      start_date = ?  # Enter the start date of the simulation
      end_date = ?  # Enter the end date of the simulation
    metfile met: filename=GHNY.met
    summaryfile
    area paddock
      soil -> /simulations/Soils/GH00970002
        Sample Initial nitrogen: same as GHNY9701_11-97 DATE3 CHINESE.paddock.Soil.Initial nitrogen
        Sample Initial water
          Layer:
            Thickness (mm)  SW (mm/mm)
            50.0            0.16
            100.0           0.16
            150.0           0.16
            150.0           0.213
            150.0           0.202
            300.0           0.217
          Date = 19970724  # Sample date
      surfaceom SurfaceOrganicMatter
        PoolName = OrganicMatter  # Organic Matter pool name
        type = peanut  # Organic Matter type
        mass = 1000.0  # Initial surface residue (kg/ha)
        cnr = 75.4717  # C:N ratio of initial residue
        standing_fraction = 0  # Fraction of residue standing
      fertiliser
      irrigation: same as GHNY9701_7-97 DATE1 CHINESE.paddock.Irrigation
      peanut
        ini: filename=peanut.xml
      folder Manager folder
        operations
          24/07/1997  peanut sow plants = 10.0, sowing_depth = 50.0 (mm), cultivar = GH0002, row_spacing = 500.0 (mm), crop_class = plant
        manager Harvesting rule
          # Harvesting criteria
          crop = peanut  # Enter name of crop to harvest when ripe
          on end_of_day:
          script: same as in GHNY9701_7-97 DATE1 CHINESE.paddock.Manager folder.Harvesting rule
      outputfile: same as GHNY9701_7-97 DATE1 CHINESE.paddock.outputfile
      outputfile ACMO: same as GHNY9701_7-97 DATE1 CHINESE.paddock.ACMO
      manager2 ACMOVariables: same as GHNY9701_7-97 DATE1 CHINESE.paddock.ACMOVariables
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