folder simulations: version=29
  folder Soils
    soil IBWH980018: Site=?; Longitude=-99.999
      Comment = ICASA Classification: Coarse-silty, mixed,calcareous,mesic Typ Udifluven  # Comments
      Latitude = -99.999  # Latitude (WGS84)
      DataSource = SCS
      Water
        Layer:
          Thickness (mm)  BD (g/cc)  AirDry (mm/mm)  LL15 (mm/mm)  DUL (mm/mm)  SAT (mm/mm)
          150.0           1.15       0.0288          0.072         0.225        0.275
          150.0           1.16       0.028           0.07          0.24         0.29
          300.0           1.21       0.016           0.04          0.154        0.194
          300.0           1.23       0.0128          0.032         0.091        0.141
          300.0           1.31       0.0128          0.032         0.087        0.137
          300.0           1.31       0.0128          0.032         0.087        0.137
          300.0           1.31       0.0128          0.032         0.087        0.137
        SoilCrop wheat
          Layer:
            Thickness (mm)  LL (mm/mm)  KL (/day)  XF (0-1)
            150.0           0.072       0.06       1.0
            150.0           0.07        0.06       0.7
            300.0           0.04        0.06       0.2
            300.0           0.032       0.06       0.05
            300.0           0.032       0.06       0.03
            300.0           0.032       0.06       0.01
            300.0           0.032       0.06       0.01
      SoilWat: SummerCona=3.5; SummerU=5.0; SummerDate=21-Mar; WinterCona=3.5; WinterU=5.0; WinterDate=21-Sep; DiffusConst=40.0; DiffusSlope=16.0; Salb=0.14; Cn2Bare=60.0; CnRed=20; CnCov=0.8
        Layer:
          Thickness (mm)  SWCON (0-1)
          150.0           0.6
          150.0           0.6
          300.0           0.6
          300.0           0.6
          300.0           0.6
          300.0           0.6
          300.0           0.6
      SoilOrganicMatter: RootCn=45; RootWt=500; SoilCn=14.5; EnrACoeff=7.4; EnrBCoeff=0.2
        Layer:
          Thickness (mm)  OC (Total %)  FBiom (0-1)  FInert (0-1)
          150.0           0.61          0.0327869    0.882
          150.0           0.61          0.0327869    0.882
          300.0           0.59          0.0338983    0.882
          300.0           0.29          0.0689655    0.882
          300.0           0.24          0.0833333    0.882
          300.0           0.2           0.1          0.882
          300.0           0.2           0.1          0.882
      Analysis
        Layer:
          Thickness (mm)  PH (1:5 water)
          150.0           7.0
          150.0           7.0
          300.0           7.0
          300.0           7.0
          300.0           7.0
          300.0           7.0
          300.0           7.0
  simulation KSAS8101_1-DRYLAND  - 0 KG N_HA
    memo LOG
      This .apsim file was created by the APSIM AgMIP translator.
      Log messages:
        * Met WARNING: No CO2 found in weather data (aco2 or co2y).
    clock
      start_date = 06/10/1981  # Enter the start date of the simulation
      end_date = 16/10/1982  # Enter the end date of the simulation
    metfile met: filename=KSAS.met
    summaryfile
    area paddock
      soil -> /simulations/Soils/IBWH980018
        Sample Initial nitrogen
          Layer:
            Thickness (mm)  NO3 (ppm)  NH4 (ppm)
            150.0           9.8        3.4
            150.0           7.3        3.2
            300.0           5.1        2.5
            300.0           4.7        2.2
            300.0           4.3        2.7
            300.0           4.3        2.7
            300.0           4.3        2.7
          Date = 19811006  # Sample date
        Sample Initial water
          Layer:
            Thickness (mm)  SW (mm/mm)
            150.0           0.205
            150.0           0.17
            300.0           0.092
            300.0           0.065
            300.0           0.066
            300.0           0.066
            300.0           0.066
          Date = 19811006  # Sample date
      surfaceom SurfaceOrganicMatter
        PoolName = OrganicMatter  # Organic Matter pool name
        type = wheat  # Organic Matter type
        mass = 6500.0  # Initial surface residue (kg/ha)
        cnr = 35.0877  # C:N ratio of initial residue
        standing_fraction = 0  # Fraction of residue standing
      fertiliser
      irrigation
        automatic_irrigation = off
        asw_depth = 600  # Depth to which ASW is calculated. (mm)
        crit_fr_asw = 0.5  # Fraction of ASW below which irrigation is applied (0-1.0)
        irrigation_efficiency = 1  # Efficiency of the irrigation. (0-1.0)
        irrigation_allocation = off  # Allocation limits
        allocation = 0  # Allocation in mm
        default_no3_conc = 0.0  # Nitrate concentration (ppm N)
        default_nh4_conc = 0.0  # Ammonium concentration (ppm N)
        default_cl_conc = 0.0  # Chloride concentration (ppm Cl)
      wheat
        ini: filename=wheat.xml
      folder Manager folder
        operations
          16/10/1981  wheat sow plants = 162.0, sowing_depth = 55.0 (mm), cultivar = CASSIUS, row_spacing = 160.0 (mm), crop_class = plant
          16/10/1981  fertiliser apply amount = 0.0 (kg/ha), type = no3_n (), depth = 15.0 (mm)
        manager Harvesting rule
          # Harvesting criteria
          crop = wheat  # Enter name of crop to harvest when ripe
          on end_of_day:
```
if [crop].StageName = 'harvest_ripe'  or [crop].plant_status = 'dead' then
   acmo do_output
   [crop] harvest
   [crop] end_crop
endif
```
      outputfile: filename=AgMIP.out; title=AgMIP
        variables
          variables: dd/mm/yyyy as Date, biomass, yield, esw, lai
        events Reporting Frequency: event=daily
      outputfile ACMO: filename=MACH0001_1__1 ACMO.out; title=MACH0001_1__1 ACMO; events=Reporting Frequency
        variables
          variable:
            yield
            biomass
            AnthesisDate format yyyy-mm-dd
            MaturityDate format yyyy-mm-dd
            Today as HarvestDate format yyyy-mm-dd
            LAIMax
            InCropRain
            SumEP
            SumNO3Uptake
            SumLeachNO3
          constants: constant format=csv
      manager2 ACMOVariables
```csharp
using System;
using ModelFramework;
using CSGeneral;

public class Script 
{      
   [Link] Paddock MyPaddock; 
   [Input] DateTime Today;
   
   [Input] double LAI;
   [Input] double ep;
   [Input] double Rain;
   [Input] double[] flow_no3;
   [Input] DateTime Simulation_end_date;
   [Output] DateTime AnthesisDate;
   [Output] DateTime MaturityDate;
   [Units("m2/m2")]
   [Output] double LAIMax = 0;
   [Units("mm")]
   [Output] double InCropRain = 0;
   [Units("mm")]
   [Output] double SumEP = 0;
   [Units("kg/ha")]
   [Output] double SumNO3Uptake = 0;
   [Units("kg/ha")]
   [Output] double SumLeachNO3 = 0;
   
   private bool ACMOHasWritten = false;
   
   // The following event handler will be called each time a crop is sown.
   [EventHandler] public void OnSowing()
   {
      LAIMax = 0.0;
      InCropRain = 0.0;
      SumEP = 0.0;
      SumNO3Uptake = 0;
      SumLeachNO3 = 0;
      ACMOHasWritten = false;
   }   
      
   // The following event handler will be called each day at the beginning of the day
   [EventHandler] public void OnPost()
   {
      // Work out flowering and maturity dates.
            string StageName;
      MyPaddock.Get("StageName", out StageName);
      if (StageName.ToLower() == "flowering") AnthesisDate = Today;
      if (StageName.ToLower() == "maturity") MaturityDate = Today;      
            
      // Get no3_uptake for whole profile (as a positive number)
      double no3_uptake = 0;
            double[] no3_uptake_array;
      MyPaddock.Get("no3_uptake", out no3_uptake_array);
      no3_uptake = -MathUtility.Sum(no3_uptake_array);  //change from negative number to positive
            LAIMax = Math.Max(LAIMax, LAI);
      SumEP = SumEP + ep;
      SumNO3Uptake = SumNO3Uptake + no3_uptake;
      InCropRain = InCropRain + Rain;
      SumLeachNO3 = SumLeachNO3 + flow_no3[flow_no3.Length - 1];
      
      
   }
   
}
```
  simulation KSAS8101_2-DRYLAND  - 60 KG N_HA
    memo LOG
      This .apsim file was created by the APSIM AgMIP translator.
      Log messages:
        * Met WARNING: No CO2 found in weather data (aco2 or co2y).
    clock
      start_date = 06/10/1981  # Enter the start date of the simulation
      end_date = 16/10/1982  # Enter the end date of the simulation
    metfile met: filename=KSAS.met
    summaryfile
    area paddock
      soil -> /simulations/Soils/IBWH980018
        Sample Initial nitrogen: same as KSAS8101_1-DRYLAND  - 0 KG N_HA.paddock.Soil.Initial nitrogen
        Sample Initial water: same as KSAS8101_1-DRYLAND  - 0 KG N_HA.paddock.Soil.Initial water
      surfaceom SurfaceOrganicMatter
        PoolName = OrganicMatter  # Organic Matter pool name
        type = wheat  # Organic Matter type
        mass = 6500.0  # Initial surface residue (kg/ha)
        cnr = 35.0877  # C:N ratio of initial residue
        standing_fraction = 0  # Fraction of residue standing
      fertiliser
      irrigation: same as KSAS8101_1-DRYLAND  - 0 KG N_HA.paddock.Irrigation
      wheat
        ini: filename=wheat.xml
      folder Manager folder
        operations
          16/10/1981  wheat sow plants = 162.0, sowing_depth = 55.0 (mm), cultivar = CASSIUS, row_spacing = 160.0 (mm), crop_class = plant
          16/10/1981  fertiliser apply amount = 60.0 (kg/ha), type = no3_n (), depth = 15.0 (mm)
        manager Harvesting rule
          # Harvesting criteria
          crop = wheat  # Enter name of crop to harvest when ripe
          on end_of_day:
          script: same as in KSAS8101_1-DRYLAND  - 0 KG N_HA.paddock.Manager folder.Harvesting rule
      outputfile: same as KSAS8101_1-DRYLAND  - 0 KG N_HA.paddock.outputfile
      outputfile ACMO: same as KSAS8101_1-DRYLAND  - 0 KG N_HA.paddock.ACMO
      manager2 ACMOVariables: same as KSAS8101_1-DRYLAND  - 0 KG N_HA.paddock.ACMOVariables
  simulation KSAS8101_3-DRYLAND  - 180 KG N_HA SP
    memo LOG
      This .apsim file was created by the APSIM AgMIP translator.
      Log messages:
        * Met WARNING: No CO2 found in weather data (aco2 or co2y).
    clock
      start_date = 06/10/1981  # Enter the start date of the simulation
      end_date = 16/10/1982  # Enter the end date of the simulation
    metfile met: filename=KSAS.met
    summaryfile
    area paddock
      soil -> /simulations/Soils/IBWH980018
        Sample Initial nitrogen: same as KSAS8101_1-DRYLAND  - 0 KG N_HA.paddock.Soil.Initial nitrogen
        Sample Initial water: same as KSAS8101_1-DRYLAND  - 0 KG N_HA.paddock.Soil.Initial water
      surfaceom SurfaceOrganicMatter
        PoolName = OrganicMatter  # Organic Matter pool name
        type = wheat  # Organic Matter type
        mass = 6500.0  # Initial surface residue (kg/ha)
        cnr = 35.0877  # C:N ratio of initial residue
        standing_fraction = 0  # Fraction of residue standing
      fertiliser
      irrigation: same as KSAS8101_1-DRYLAND  - 0 KG N_HA.paddock.Irrigation
      wheat
        ini: filename=wheat.xml
      folder Manager folder
        operations
          16/10/1981  wheat sow plants = 162.0, sowing_depth = 55.0 (mm), cultivar = CASSIUS, row_spacing = 160.0 (mm), crop_class = plant
          16/10/1981  fertiliser apply amount = 90.0 (kg/ha), type = no3_n (), depth = 15.0 (mm)
          25/02/1982  fertiliser apply amount = 90.0 (kg/ha), type = no3_n (), depth = 1.0 (mm)
        manager Harvesting rule
          # Harvesting criteria
          crop = wheat  # Enter name of crop to harvest when ripe
          on end_of_day:
          script: same as in KSAS8101_1-DRYLAND  - 0 KG N_HA.paddock.Manager folder.Harvesting rule
      outputfile: same as KSAS8101_1-DRYLAND  - 0 KG N_HA.paddock.outputfile
      outputfile ACMO: same as KSAS8101_1-DRYLAND  - 0 KG N_HA.paddock.ACMO
      manager2 ACMOVariables: same as KSAS8101_1-DRYLAND  - 0 KG N_HA.paddock.ACMOVariables
  simulation KSAS8101_4-IRRIGATED - 0 KG N_HA
    memo LOG
      This .apsim file was created by the APSIM AgMIP translator.
      Log messages:
        * Met WARNING: No CO2 found in weather data (aco2 or co2y).
    clock
      start_date = 06/10/1981  # Enter the start date of the simulation
      end_date = 16/10/1982  # Enter the end date of the simulation
    metfile met: filename=KSAS.met
    summaryfile
    area paddock
      soil -> /simulations/Soils/IBWH980018
        Sample Initial nitrogen: same as KSAS8101_1-DRYLAND  - 0 KG N_HA.paddock.Soil.Initial nitrogen
        Sample Initial water: same as KSAS8101_1-DRYLAND  - 0 KG N_HA.paddock.Soil.Initial water
      surfaceom SurfaceOrganicMatter
        PoolName = OrganicMatter  # Organic Matter pool name
        type = wheat  # Organic Matter type
        mass = 6500.0  # Initial surface residue (kg/ha)
        cnr = 35.0877  # C:N ratio of initial residue
        standing_fraction = 0  # Fraction of residue standing
      fertiliser
      irrigation: same as KSAS8101_1-DRYLAND  - 0 KG N_HA.paddock.Irrigation
      wheat
        ini: filename=wheat.xml
      folder Manager folder
        operations
          16/10/1981  wheat sow plants = 162.0, sowing_depth = 55.0 (mm), cultivar = CASSIUS, row_spacing = 160.0 (mm), crop_class = plant
          16/10/1981  fertiliser apply amount = 0.0 (kg/ha), type = no3_n (), depth = 15.0 (mm)
          06/04/1982  irrigation apply amount = 65.0 (mm)
          20/04/1982  irrigation apply amount = 78.0 (mm)
          27/04/1982  irrigation apply amount = 70.0 (mm)
        manager Harvesting rule
          # Harvesting criteria
          crop = wheat  # Enter name of crop to harvest when ripe
          on end_of_day:
          script: same as in KSAS8101_1-DRYLAND  - 0 KG N_HA.paddock.Manager folder.Harvesting rule
      outputfile: same as KSAS8101_1-DRYLAND  - 0 KG N_HA.paddock.outputfile
      outputfile ACMO: same as KSAS8101_1-DRYLAND  - 0 KG N_HA.paddock.ACMO
      manager2 ACMOVariables: same as KSAS8101_1-DRYLAND  - 0 KG N_HA.paddock.ACMOVariables
  simulation KSAS8101_5-IRRIGATED - 60 KG N_HA
    memo LOG
      This .apsim file was created by the APSIM AgMIP translator.
      Log messages:
        * Met WARNING: No CO2 found in weather data (aco2 or co2y).
    clock
      start_date = 06/10/1981  # Enter the start date of the simulation
      end_date = 16/10/1982  # Enter the end date of the simulation
    metfile met: filename=KSAS.met
    summaryfile
    area paddock
      soil -> /simulations/Soils/IBWH980018
        Sample Initial nitrogen: same as KSAS8101_1-DRYLAND  - 0 KG N_HA.paddock.Soil.Initial nitrogen
        Sample Initial water: same as KSAS8101_1-DRYLAND  - 0 KG N_HA.paddock.Soil.Initial water
      surfaceom SurfaceOrganicMatter
        PoolName = OrganicMatter  # Organic Matter pool name
        type = wheat  # Organic Matter type
        mass = 6500.0  # Initial surface residue (kg/ha)
        cnr = 35.0877  # C:N ratio of initial residue
        standing_fraction = 0  # Fraction of residue standing
      fertiliser
      irrigation: same as KSAS8101_1-DRYLAND  - 0 KG N_HA.paddock.Irrigation
      wheat
        ini: filename=wheat.xml
      folder Manager folder
        operations
          16/10/1981  wheat sow plants = 162.0, sowing_depth = 55.0 (mm), cultivar = CASSIUS, row_spacing = 160.0 (mm), crop_class = plant
          16/10/1981  fertiliser apply amount = 60.0 (kg/ha), type = no3_n (), depth = 15.0 (mm)
          06/04/1982  irrigation apply amount = 65.0 (mm)
          20/04/1982  irrigation apply amount = 78.0 (mm)
          27/04/1982  irrigation apply amount = 70.0 (mm)
        manager Harvesting rule
          # Harvesting criteria
          crop = wheat  # Enter name of crop to harvest when ripe
          on end_of_day:
          script: same as in KSAS8101_1-DRYLAND  - 0 KG N_HA.paddock.Manager folder.Harvesting rule
      outputfile: same as KSAS8101_1-DRYLAND  - 0 KG N_HA.paddock.outputfile
      outputfile ACMO: same as KSAS8101_1-DRYLAND  - 0 KG N_HA.paddock.ACMO
      manager2 ACMOVariables: same as KSAS8101_1-DRYLAND  - 0 KG N_HA.paddock.ACMOVariables
  simulation KSAS8101_6-IRRIGATED 180 KG N_HA SPL
    memo LOG
      This .apsim file was created by the APSIM AgMIP translator.
      Log messages:
        * Met WARNING: No CO2 found in weather data (aco2 or co2y).
    clock
      start_date = 06/10/1981  # Enter the start date of the simulation
      end_date = 16/10/1982  # Enter the end date of the simulation
    metfile met: filename=KSAS.met
    summaryfile
    area paddock
      soil -> /simulations/Soils/IBWH980018
        Sample Initial nitrogen: same as KSAS8101_1-DRYLAND  - 0 KG N_HA.paddock.Soil.Initial nitrogen
        Sample Initial water: same as KSAS8101_1-DRYLAND  - 0 KG N_HA.paddock.Soil.Initial water
      surfaceom SurfaceOrganicMatter
        PoolName = OrganicMatter  # Organic Matter pool name
        type = wheat  # Organic Matter type
        mass = 6500.0  # Initial surface residue (kg/ha)
        cnr = 35.0877  # C:N ratio of initial residue
        standing_fraction = 0  # Fraction of residue standing
      fertiliser
      irrigation: same as KSAS8101_1-DRYLAND  - 0 KG N_HA.paddock.Irrigation
      wheat
        ini: filename=wheat.xml
      folder Manager folder
        operations
          16/10/1981  wheat sow plants = 162.0, sowing_depth = 55.0 (mm), cultivar = CASSIUS, row_spacing = 160.0 (mm), crop_class = plant
          16/10/1981  fertiliser apply amount = 90.0 (kg/ha), type = no3_n (), depth = 15.0 (mm)
          25/02/1982  fertiliser apply amount = 90.0 (kg/ha), type = no3_n (), depth = 1.0 (mm)
          06/04/1982  irrigation apply amount = 65.0 (mm)
          20/04/1982  irrigation apply amount = 78.0 (mm)
          27/04/1982  irrigation apply amount = 70.0 (mm)
        manager Harvesting rule
          # Harvesting criteria
          crop = wheat  # Enter name of crop to harvest when ripe
          on end_of_day:
          script: same as in KSAS8101_1-DRYLAND  - 0 KG N_HA.paddock.Manager folder.Harvesting rule
      outputfile: same as KSAS8101_1-DRYLAND  - 0 KG N_HA.paddock.outputfile
      outputfile ACMO: same as KSAS8101_1-DRYLAND  - 0 KG N_HA.paddock.ACMO
      manager2 ACMOVariables: same as KSAS8101_1-DRYLAND  - 0 KG N_HA.paddock.ACMOVariables
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